** CalculiX Input File - Generated by SimForge
** Beam: 2000mm span, 120x200mm, 6mm wall
** Load: 100000N
** Ribs: 0
** Mesh: 99 nodes, 40 elements

*HEADING
Beam Analysis with 0 Internal Ribs
Static Linear Analysis

** ====================================================
** MATERIAL PROPERTIES
** ====================================================
*MATERIAL, NAME=STEEL
*ELASTIC
200000, 0.29
*DENSITY
7850
*EXPANSION
1.2e-5

** ====================================================
** NODES
** ====================================================
*NODE, NSET=ALL
1, 0.000000, 0.000000, 0.000000
2, 0.000000, 0.000000, 100.000000
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
** ====================================================
** ELEMENTS
** ====================================================
*ELEMENT, TYPE=C3D8R, ELSET=BEAM
1, 1, 10, 13, 4, 2, 11, 14, 5
2, 2, 11, 14, 5, 3, 12, 15, 6
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
** ====================================================
** MATERIAL ASSIGNMENT
** ====================================================
*SOLID SECTION, ELSET=BEAM, MATERIAL=STEEL

** ====================================================
** BOUNDARY CONDITIONS
** ====================================================
*BOUNDARY
1, 1, 3, 0.0
1, 1, 3, 0.0
1, 1, 3, 0.0
1, 1, 3, 0.0
1, 1, 3, 0.0
1, 1, 3, 0.0
1, 1, 3, 0.0
1, 1, 3, 0.0
1, 1, 3, 0.0

** ====================================================
** LOADS
** ====================================================
*CLOAD
91, 3, -11111.11
92, 3, -11111.11
93, 3, -11111.11
94, 3, -11111.11
95, 3, -11111.11
96, 3, -11111.11
97, 3, -11111.11
98, 3, -11111.11
99, 3, -11111.11

** ====================================================
** OUTPUT
** ====================================================
*STEP
Static Analysis
*STATIC
1.0, 1.0, 1e-5, 1.0
*OUTPUT, FIELD
*NODE FILE, FREQUENCY=1
U, RF
*EL FILE, FREQUENCY=1
S, E, MISES
*END STEP
