** CalculiX Input File - Generated by SimForge
** Beam: 2000mm span, 120x200mm, 6mm wall
** Load: 100000N
** Ribs: 0
** Mesh: 99 nodes, 40 elements

*HEADING
Beam Analysis with 0 Internal Ribs
Static Linear Analysis

** ====================================================
** MATERIAL PROPERTIES
** ====================================================
*MATERIAL, NAME=STEEL
*ELASTIC
200000, 0.29
*DENSITY
7850
*EXPANSION
1.2e-5

** ====================================================
** NODES
** ====================================================
*NODE, NSET=ALL
1, 0.000000, 0.000000, 0.000000
2, 0.000000, 0.000000, 100.000000
3, 0.000000, 0.000000, 200.000000
4, 0.000000, 60.000000, 0.000000
5, 0.000000, 60.000000, 100.000000
6, 0.000000, 60.000000, 200.000000
7, 0.000000, 120.000000, 0.000000
8, 0.000000, 120.000000, 100.000000
9, 0.000000, 120.000000, 200.000000
10, 200.000000, 0.000000, 0.000000
11, 200.000000, 0.000000, 100.000000
12, 200.000000, 0.000000, 200.000000
13, 200.000000, 60.000000, 0.000000
14, 200.000000, 60.000000, 100.000000
15, 200.000000, 60.000000, 200.000000
16, 200.000000, 120.000000, 0.000000
17, 200.000000, 120.000000, 100.000000
18, 200.000000, 120.000000, 200.000000
19, 400.000000, 0.000000, 0.000000
20, 400.000000, 0.000000, 100.000000
21, 400.000000, 0.000000, 200.000000
22, 400.000000, 60.000000, 0.000000
23, 400.000000, 60.000000, 100.000000
24, 400.000000, 60.000000, 200.000000
25, 400.000000, 120.000000, 0.000000
26, 400.000000, 120.000000, 100.000000
27, 400.000000, 120.000000, 200.000000
28, 600.000000, 0.000000, 0.000000
29, 600.000000, 0.000000, 100.000000
30, 600.000000, 0.000000, 200.000000
31, 600.000000, 60.000000, 0.000000
32, 600.000000, 60.000000, 100.000000
33, 600.000000, 60.000000, 200.000000
34, 600.000000, 120.000000, 0.000000
35, 600.000000, 120.000000, 100.000000
36, 600.000000, 120.000000, 200.000000
37, 800.000000, 0.000000, 0.000000
38, 800.000000, 0.000000, 100.000000
39, 800.000000, 0.000000, 200.000000
40, 800.000000, 60.000000, 0.000000
41, 800.000000, 60.000000, 100.000000
42, 800.000000, 60.000000, 200.000000
43, 800.000000, 120.000000, 0.000000
44, 800.000000, 120.000000, 100.000000
45, 800.000000, 120.000000, 200.000000
46, 1000.000000, 0.000000, 0.000000
47, 1000.000000, 0.000000, 100.000000
48, 1000.000000, 0.000000, 200.000000
49, 1000.000000, 60.000000, 0.000000
50, 1000.000000, 60.000000, 100.000000
51, 1000.000000, 60.000000, 200.000000
52, 1000.000000, 120.000000, 0.000000
53, 1000.000000, 120.000000, 100.000000
54, 1000.000000, 120.000000, 200.000000
55, 1200.000000, 0.000000, 0.000000
56, 1200.000000, 0.000000, 100.000000
57, 1200.000000, 0.000000, 200.000000
58, 1200.000000, 60.000000, 0.000000
59, 1200.000000, 60.000000, 100.000000
60, 1200.000000, 60.000000, 200.000000
61, 1200.000000, 120.000000, 0.000000
62, 1200.000000, 120.000000, 100.000000
63, 1200.000000, 120.000000, 200.000000
64, 1400.000000, 0.000000, 0.000000
65, 1400.000000, 0.000000, 100.000000
66, 1400.000000, 0.000000, 200.000000
67, 1400.000000, 60.000000, 0.000000
68, 1400.000000, 60.000000, 100.000000
69, 1400.000000, 60.000000, 200.000000
70, 1400.000000, 120.000000, 0.000000
71, 1400.000000, 120.000000, 100.000000
72, 1400.000000, 120.000000, 200.000000
73, 1600.000000, 0.000000, 0.000000
74, 1600.000000, 0.000000, 100.000000
75, 1600.000000, 0.000000, 200.000000
76, 1600.000000, 60.000000, 0.000000
77, 1600.000000, 60.000000, 100.000000
78, 1600.000000, 60.000000, 200.000000
79, 1600.000000, 120.000000, 0.000000
80, 1600.000000, 120.000000, 100.000000
81, 1600.000000, 120.000000, 200.000000
82, 1800.000000, 0.000000, 0.000000
83, 1800.000000, 0.000000, 100.000000
84, 1800.000000, 0.000000, 200.000000
85, 1800.000000, 60.000000, 0.000000
86, 1800.000000, 60.000000, 100.000000
87, 1800.000000, 60.000000, 200.000000
88, 1800.000000, 120.000000, 0.000000
89, 1800.000000, 120.000000, 100.000000
90, 1800.000000, 120.000000, 200.000000
91, 2000.000000, 0.000000, 0.000000
92, 2000.000000, 0.000000, 100.000000
93, 2000.000000, 0.000000, 200.000000
94, 2000.000000, 60.000000, 0.000000
95, 2000.000000, 60.000000, 100.000000
96, 2000.000000, 60.000000, 200.000000
97, 2000.000000, 120.000000, 0.000000
98, 2000.000000, 120.000000, 100.000000
99, 2000.000000, 120.000000, 200.000000

** ====================================================
** ELEMENTS
** ====================================================
*ELEMENT, TYPE=C3D8R, ELSET=BEAM
1, 1, 10, 13, 4, 2, 11, 14, 5
2, 2, 11, 14, 5, 3, 12, 15, 6
3, 4, 13, 16, 7, 5, 14, 17, 8
4, 5, 14, 17, 8, 6, 15, 18, 9
5, 10, 19, 22, 13, 11, 20, 23, 14
6, 11, 20, 23, 14, 12, 21, 24, 15
7, 13, 22, 25, 16, 14, 23, 26, 17
8, 14, 23, 26, 17, 15, 24, 27, 18
9, 19, 28, 31, 22, 20, 29, 32, 23
10, 20, 29, 32, 23, 21, 30, 33, 24
11, 22, 31, 34, 25, 23, 32, 35, 26
12, 23, 32, 35, 26, 24, 33, 36, 27
13, 28, 37, 40, 31, 29, 38, 41, 32
14, 29, 38, 41, 32, 30, 39, 42, 33
15, 31, 40, 43, 34, 32, 41, 44, 35
16, 32, 41, 44, 35, 33, 42, 45, 36
17, 37, 46, 49, 40, 38, 47, 50, 41
18, 38, 47, 50, 41, 39, 48, 51, 42
19, 40, 49, 52, 43, 41, 50, 53, 44
20, 41, 50, 53, 44, 42, 51, 54, 45
21, 46, 55, 58, 49, 47, 56, 59, 50
22, 47, 56, 59, 50, 48, 57, 60, 51
23, 49, 58, 61, 52, 50, 59, 62, 53
24, 50, 59, 62, 53, 51, 60, 63, 54
25, 55, 64, 67, 58, 56, 65, 68, 59
26, 56, 65, 68, 59, 57, 66, 69, 60
27, 58, 67, 70, 61, 59, 68, 71, 62
28, 59, 68, 71, 62, 60, 69, 72, 63
29, 64, 73, 76, 67, 65, 74, 77, 68
30, 65, 74, 77, 68, 66, 75, 78, 69
31, 67, 76, 79, 70, 68, 77, 80, 71
32, 68, 77, 80, 71, 69, 78, 81, 72
33, 73, 82, 85, 76, 74, 83, 86, 77
34, 74, 83, 86, 77, 75, 84, 87, 78
35, 76, 85, 88, 79, 77, 86, 89, 80
36, 77, 86, 89, 80, 78, 87, 90, 81
37, 82, 91, 94, 85, 83, 92, 95, 86
38, 83, 92, 95, 86, 84, 93, 96, 87
39, 85, 94, 97, 88, 86, 95, 98, 89
40, 86, 95, 98, 89, 87, 96, 99, 90

** ====================================================
** MATERIAL ASSIGNMENT
** ====================================================
*SOLID SECTION, ELSET=BEAM, MATERIAL=STEEL

** ====================================================
** BOUNDARY CONDITIONS
** ====================================================
*BOUNDARY
1, 1, 3, 0.0
2, 1, 3, 0.0
3, 1, 3, 0.0
4, 1, 3, 0.0
5, 1, 3, 0.0
6, 1, 3, 0.0
7, 1, 3, 0.0
8, 1, 3, 0.0
9, 1, 3, 0.0

** ====================================================
** OUTPUT
** ====================================================
*STEP
StaticAnalysis
*STATIC
1.0, 1.0, 1e-5, 1.0
*CLOAD
91, 3, -11111.11
92, 3, -11111.11
93, 3, -11111.11
94, 3, -11111.11
95, 3, -11111.11
96, 3, -11111.11
97, 3, -11111.11
98, 3, -11111.11
99, 3, -11111.11
*NODE FILE
U, RF
*EL FILE
S, E, MISES
*END STEP
